# 2D particle pipe simulation

atom_style	sphere
atom_modify	map array
boundary	pp ff pp
newton		off

communicate single vel yes
read_data 	In_initial.in

neighbor	5.0e-4 bin
neigh_modify	delay 0

# pair_style  none
pair_style  gran/hooke/history 200.0 NULL 25000 NULL 0.4 0
pair_coeff  * *
timestep	2e-6

group       bottom type 2
group       active subtract all bottom

velocity    all set 0.0 0.0 0.0 units box

fix		1 all nve/sphere
fix		2 all gravity 9.8 vector 0 -1 0 # spherical 90.0 -180.0
fix     3 all fdrag
fix     4 bottom freeze

fix ywall all wall/gran 20000.0 NULL 25000 NULL 0.4 0 yplane 0.0 0.0167

dump		id all custom 1000000 snapshot.bubblemd id type diameter mass x y z vx vy vz fx fy fz

#thermo_style  granular # not work. syntax change?
thermo_style  one   # granular does not work
thermo		2000
thermo_modify	lost error
#restart		1000000  restart.*.bubblemd
